*HEADING
 Biofilm bilayer: stiff growing crust on soft inert base -> wrinkling (A1)
*NODE
 1, 0.000000, 0.000000, 0.000000
 2, 0.166667, 0.000000, 0.000000
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*ELEMENT, TYPE=C3D8, ELSET=ALLEL
 1, 1,2,51,50,99,100,149,148
 2, 2,3,52,51,100,101,150,149
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*ELSET, ELSET=CRUST
 289,290,291,292,293,294
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*ELSET, ELSET=BASE
 1,2,3,4,5,6
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*SOLID SECTION, ELSET=CRUST, MATERIAL=CRUSTMAT
*MATERIAL, NAME=CRUSTMAT
*USER MATERIAL, CONSTANTS=2
 50000, 0.45
*DEPVAR
 1
*SOLID SECTION, ELSET=BASE, MATERIAL=BASEMAT
*MATERIAL, NAME=BASEMAT
*ELASTIC
 2000, 0.45
*NSET, NSET=XSYM
 1,50,99,148,197,246
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*NSET, NSET=YSYM
 1,2,3,4,5,6
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*NSET, NSET=ZBOT
 1,2,3,4,5,6
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*BOUNDARY
 XSYM, 1, 1
 YSYM, 2, 2
 ZBOT, 1, 3
*STEP, NLGEOM=YES, INC=1000
 differential growth of crust -> wrinkling
*STATIC, STABILIZE=0.002, ALLSDTOL=0.05, CONTINUE=NO
 0.01, 1.0, 1.0E-8, 0.02
*OUTPUT, FIELD, FREQUENCY=1
*NODE OUTPUT
 U
*ELEMENT OUTPUT, POSITION=CENTROID
 S
*END STEP
