*HEADING
 Biofilm film strip, seeded imperfection -> growth-induced buckling (B1)
*NODE
 1, 0.000000, 0.000000, 0.000000
 2, 0.250000, 0.000000, 0.000000
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*ELEMENT, TYPE=C3D8, ELSET=FILM
 1, 1,2,19,18,35,36,53,52
 2, 2,3,20,19,36,37,54,53
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*SOLID SECTION, ELSET=FILM, MATERIAL=BIOFILM
*MATERIAL, NAME=BIOFILM
*USER MATERIAL, CONSTANTS=2
 5000., 0.45
*DEPVAR
 1
*NSET, NSET=XSYM
 1,18,35,52,69,86
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*NSET, NSET=YSYM
 1,2,3,4,5,6
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*NSET, NSET=ZBOT
 1,2,3,4,5,6
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*BOUNDARY
 XSYM, 1, 1
 YSYM, 2, 2
 ZBOT, 3, 3
*STEP, NLGEOM=YES, INC=500
 elevated growth, seeded imperfection
*STATIC, STABILIZE=1.0E-4
 0.02, 1.0, 1.0E-6, 0.02
*OUTPUT, FIELD, FREQUENCY=1
*NODE OUTPUT
 U
*ELEMENT OUTPUT, POSITION=CENTROID
 S
*END STEP
