*HEADING
 Biofilm film strip on COHESIVE base (12x1x8 C3D8 + 12 COH3D8) -> delamination
*NODE
 1, 0.000000, 0.000000, 0.000000
 2, 0.333333, 0.000000, 0.000000
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*ELEMENT, TYPE=C3D8, ELSET=FILM
 1, 1,2,15,14,27,28,41,40
 2, 2,3,16,15,28,29,42,41
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*ELEMENT, TYPE=COH3D8, ELSET=COH
 97, 334,335,348,347,1,2,15,14
 98, 335,336,349,348,2,3,16,15
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*ELSET, ELSET=COH_X, GENERATE
 97, 108, 1
*SOLID SECTION, ELSET=FILM, MATERIAL=BIOFILM
*MATERIAL, NAME=BIOFILM
*USER MATERIAL, CONSTANTS=2
 5000., 0.45
*DEPVAR
 1
*COHESIVE SECTION, ELSET=COH, MATERIAL=COHMAT, RESPONSE=TRACTION SEPARATION
 1.0
*MATERIAL, NAME=COHMAT
*ELASTIC, TYPE=TRACTION
 50000, 50000, 50000
*DAMAGE INITIATION, CRITERION=QUADS
 120, 120, 120
*DAMAGE EVOLUTION, TYPE=ENERGY, MIXED MODE BEHAVIOR=BK, POWER=1.45
 4, 4, 4
*DAMAGE STABILIZATION
 1.0E-4
*NSET, NSET=XSYM
 1,14,27,40,53,66
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*NSET, NSET=YSYM
 1,2,3,4,5,6
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*NSET, NSET=CBOT
 334,335,336,337,338,339
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*BOUNDARY
 XSYM, 1, 1
 YSYM, 2, 2
 CBOT, 1, 3
*STEP, NLGEOM=YES, INC=500
 Depth-graded growth on cohesive base -> edge delamination
*STATIC
 0.02, 1.0, 1.0E-5, 0.02
*OUTPUT, FIELD
*NODE OUTPUT
 U
*ELEMENT OUTPUT, POSITION=CENTROID
 S, E, SDV, SDEG, COORD
*OUTPUT, HISTORY, VARIABLE=PRESELECT
*END STEP
