*HEADING
 Biofilm film strip (12x1x8 C3D8) free edge -> edge stress (B1 buckling / B2 delam base)
*NODE
 1, 0.000000, 0.000000, 0.000000
 2, 0.333333, 0.000000, 0.000000
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*ELEMENT, TYPE=C3D8, ELSET=FILM
 1, 1,2,15,14,27,28,41,40
 2, 2,3,16,15,28,29,42,41
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*SOLID SECTION, ELSET=FILM, MATERIAL=BIOFILM
*MATERIAL, NAME=BIOFILM
*USER MATERIAL, CONSTANTS=2
 5000., 0.45
*DEPVAR
 1
*NSET, NSET=XSYM
 1,14,27,40,53,66
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*NSET, NSET=YSYM
 1,2,3,4,5,6
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*NSET, NSET=ZBOT
 1,2,3,4,5,6
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*BOUNDARY
 XSYM, 1, 1
 YSYM, 2, 2
 ZBOT, 3, 3
*STEP, NLGEOM=YES, INC=200
 Depth-graded growth, free edge
*STATIC
 0.05, 1.0, 1.0E-4, 0.05
*OUTPUT, FIELD
*NODE OUTPUT
 U
*ELEMENT OUTPUT, POSITION=CENTROID
 S, E, SDV, COORD
*OUTPUT, HISTORY, VARIABLE=PRESELECT
*END STEP
