*HEADING
 Implant biofilm NSP UMAT: cond=DH profile=thread amp=0.180  (C3D8 thin slice, z-symmetry)
*NODE
 1, 0.000000, 0.000000, 0.000000
 2, 0.041667, 0.003067, 0.000000
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*ELEMENT, TYPE=C3D8, ELSET=BIOFILM
 1, 1, 2, 75, 74, 950, 951, 1024, 1023
 2, 2, 3, 76, 75, 951, 952, 1025, 1024
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*SOLID SECTION, ELSET=BIOFILM, MATERIAL=NSP_BIOFILM
*MATERIAL, NAME=NSP_BIOFILM
*USER MATERIAL, CONSTANTS=5
 5000.0, 0.450, 17.1806, -1.337223, 1.0000
*DEPVAR
 1
*NSET, NSET=BOTTOM
 1,2,3,4,5,6
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*NSET, NSET=FRONT
 1,2,3,4,5,6
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*NSET, NSET=BACK
 950,951,952,953,954,955
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*BOUNDARY
 BOTTOM, 1, 3
 FRONT,  3, 3
 BACK,   3, 3
*STEP, NLGEOM=YES, INC=200
 NSP socket UMAT: depth-graded growth on implant-thread geometry
*STATIC
 0.05, 1.0, 1e-5, 0.05
*OUTPUT, FIELD
*NODE OUTPUT
 U, COORD
*ELEMENT OUTPUT, POSITION=CENTROID
 S, SDV, COORD
*END STEP
