*HEADING
 Finite-strain (F=Fe.Fg) implant-thread biofilm, cond=DH, umat_growth_phi, NLGEOM
*NODE
 1, 0.000000, 0.000000
 2, 0.027778, 0.001367
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*ELEMENT, TYPE=CPE4, ELSET=FILM
 1, 1, 2, 111, 110
 2, 2, 3, 112, 111
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*SOLID SECTION, ELSET=FILM, MATERIAL=BIOFILM
*MATERIAL, NAME=BIOFILM
*USER MATERIAL, CONSTANTS=5
** E, nu, beta_depth(CLSM), intercept(CLSM), mode(1=iso volume-matched)
 5000.0, 0.450, 17.180641, -1.337223, 1.0
*DEPVAR
 3
*NSET, NSET=BOTTOM
 1,2,3,4,5,6
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*NSET, NSET=ALLN
 1,2,3,4,5,6
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*INITIAL CONDITIONS, TYPE=FIELD, VARIABLE=1
 ALLN, 0.0
*BOUNDARY
 BOTTOM, 1, 2
*STEP, NLGEOM=YES, INC=300
 Ramp phi_Pg(z) 0 -> profile; finite-strain growth F=Fe.Fg -> interface stress
*STATIC
 0.02, 1.0, 1.0E-5, 0.05
*FIELD, VARIABLE=1
 1, 0.014953
 2, 0.014953
 3, 0.014953
 4, 0.014953
 5, 0.014953
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 2071, 0.104248
*OUTPUT, FIELD
*NODE OUTPUT
 U
*ELEMENT OUTPUT, POSITION=CENTROID
 S, SDV, COORD
*END STEP
