*HEADING
 A3 MMS: u_x=alpha sin(pi X/L), body-force-driven, C3D8 (order of accuracy)
*NODE
 1, 0.00000000, 0.000000, 0.000000
 2, 0.03125000, 0.000000, 0.000000
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*ELEMENT, TYPE=C3D8, ELSET=ALL
 1, 1,2,35,34,67,68,101,100
 2, 2,3,36,35,68,69,102,101
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*SOLID SECTION, ELSET=ALL, MATERIAL=BIOFILM
*MATERIAL, NAME=BIOFILM
*USER MATERIAL, CONSTANTS=2
 5000., 0.45
*DEPVAR
 1
*ELSET, ELSET=E1
 1
*ELSET, ELSET=E2
 2
*ELSET, ELSET=E3
 3
*ELSET, ELSET=E4
 4
*ELSET, ELSET=E5
 5
*ELSET, ELSET=E6
 6
*ELSET, ELSET=E7
 7
*ELSET, ELSET=E8
 8
*ELSET, ELSET=E9
 9
*ELSET, ELSET=E10
 10
*ELSET, ELSET=E11
 11
*ELSET, ELSET=E12
 12
*ELSET, ELSET=E13
 13
*ELSET, ELSET=E14
 14
*ELSET, ELSET=E15
 15
*ELSET, ELSET=E16
 16
*ELSET, ELSET=E17
 17
*ELSET, ELSET=E18
 18
*ELSET, ELSET=E19
 19
*ELSET, ELSET=E20
 20
*ELSET, ELSET=E21
 21
*ELSET, ELSET=E22
 22
*ELSET, ELSET=E23
 23
*ELSET, ELSET=E24
 24
*ELSET, ELSET=E25
 25
*ELSET, ELSET=E26
 26
*ELSET, ELSET=E27
 27
*ELSET, ELSET=E28
 28
*ELSET, ELSET=E29
 29
*ELSET, ELSET=E30
 30
*ELSET, ELSET=E31
 31
*ELSET, ELSET=E32
 32
*NSET, NSET=ALLN
 1,2,3,4,5,6
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*NSET, NSET=XEND
 1,34,67,100,33,66,99,132
*BOUNDARY
 ALLN, 2, 3
 XEND, 1, 1
*STEP, NLGEOM=YES, INC=50
 body-force-driven manufactured solution
*STATIC
 0.1, 1.0, 1.0E-4, 0.1
*DLOAD
 E1, BX, 9.1845928956e-01
 E2, BX, 2.7465326036e+00
 E3, BX, 4.5481553073e+00
 E4, BX, 6.3059767891e+00
 E5, BX, 8.0030682673e+00
 E6, BX, 9.6230858231e+00
 E7, BX, 1.1150427802e+01
 E8, BX, 1.2570385065e+01
 E9, BX, 1.3869282649e+01
 E10, BX, 1.5034611459e+01
 E11, BX, 1.6055148742e+01
 E12, BX, 1.6921066166e+01
 E13, BX, 1.7624024473e+01
 E14, BX, 1.8157253790e+01
 E15, BX, 1.8515618827e+01
 E16, BX, 1.8695668333e+01
 E17, BX, 1.8695668333e+01
 E18, BX, 1.8515618827e+01
 E19, BX, 1.8157253790e+01
 E20, BX, 1.7624024473e+01
 E21, BX, 1.6921066166e+01
 E22, BX, 1.6055148742e+01
 E23, BX, 1.5034611459e+01
 E24, BX, 1.3869282649e+01
 E25, BX, 1.2570385065e+01
 E26, BX, 1.1150427802e+01
 E27, BX, 9.6230858231e+00
 E28, BX, 8.0030682673e+00
 E29, BX, 6.3059767891e+00
 E30, BX, 4.5481553073e+00
 E31, BX, 2.7465326036e+00
 E32, BX, 9.1845928956e-01
*OUTPUT, FIELD
*NODE OUTPUT
 U
*ELEMENT OUTPUT, POSITION=CENTROID
 S
*END STEP
