*HEADING
 Poroelastic implant-thread (Terzaghi), cond=DH
*NODE
 1, 0.000000, 0.000000
 2, 0.041667, 0.003067
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*ELEMENT, TYPE=CPE4P, ELSET=FILM
 1, 1, 2, 75, 74
 2, 2, 3, 76, 75
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*ELSET, ELSET=ROW0
 1,2,3,4,5,6
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*ELSET, ELSET=ROW1
 73,74,75,76,77,78
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*ELSET, ELSET=ROW2
 145,146,147,148,149,150
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*ELSET, ELSET=ROW3
 217,218,219,220,221,222
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*ELSET, ELSET=ROW4
 289,290,291,292,293,294
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*ELSET, ELSET=ROW5
 361,362,363,364,365,366
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*ELSET, ELSET=ROW6
 433,434,435,436,437,438
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*ELSET, ELSET=ROW7
 505,506,507,508,509,510
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*ELSET, ELSET=ROW8
 577,578,579,580,581,582
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*ELSET, ELSET=ROW9
 649,650,651,652,653,654
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*ELSET, ELSET=ROW10
 721,722,723,724,725,726
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*ELSET, ELSET=ROW11
 793,794,795,796,797,798
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*ORIENTATION, NAME=ORI, SYSTEM=RECTANGULAR, DEFINITION=COORDINATES
 1.0,0.0,0.0,0.0,1.0,0.0
 3, 0.0
*SOLID SECTION, ELSET=ROW0, MATERIAL=MAT0, ORIENTATION=ORI
*SOLID SECTION, ELSET=ROW1, MATERIAL=MAT1, ORIENTATION=ORI
*SOLID SECTION, ELSET=ROW2, MATERIAL=MAT2, ORIENTATION=ORI
*SOLID SECTION, ELSET=ROW3, MATERIAL=MAT3, ORIENTATION=ORI
*SOLID SECTION, ELSET=ROW4, MATERIAL=MAT4, ORIENTATION=ORI
*SOLID SECTION, ELSET=ROW5, MATERIAL=MAT5, ORIENTATION=ORI
*SOLID SECTION, ELSET=ROW6, MATERIAL=MAT6, ORIENTATION=ORI
*SOLID SECTION, ELSET=ROW7, MATERIAL=MAT7, ORIENTATION=ORI
*SOLID SECTION, ELSET=ROW8, MATERIAL=MAT8, ORIENTATION=ORI
*SOLID SECTION, ELSET=ROW9, MATERIAL=MAT9, ORIENTATION=ORI
*SOLID SECTION, ELSET=ROW10, MATERIAL=MAT10, ORIENTATION=ORI
*SOLID SECTION, ELSET=ROW11, MATERIAL=MAT11, ORIENTATION=ORI
*MATERIAL, NAME=MAT0
*ELASTIC
 5000.0, 0.450
*EXPANSION, TYPE=ORTHO, ZERO=0.0
 0.000000, 0.000000, 0.000000
*PERMEABILITY, SPECIFIC=10.0
 1.0E-4, 1.0
*MATERIAL, NAME=MAT1
*ELASTIC
 5000.0, 0.450
*EXPANSION, TYPE=ORTHO, ZERO=0.0
 0.330638, 0.330638, 0.330638
*PERMEABILITY, SPECIFIC=10.0
 1.0E-4, 1.0
*MATERIAL, NAME=MAT2
*ELASTIC
 5000.0, 0.450
*EXPANSION, TYPE=ORTHO, ZERO=0.0
 0.166538, 0.166538, 0.166538
*PERMEABILITY, SPECIFIC=10.0
 1.0E-4, 1.0
*MATERIAL, NAME=MAT3
*ELASTIC
 5000.0, 0.450
*EXPANSION, TYPE=ORTHO, ZERO=0.0
 0.000000, 0.000000, 0.000000
*PERMEABILITY, SPECIFIC=10.0
 1.0E-4, 1.0
*MATERIAL, NAME=MAT4
*ELASTIC
 5000.0, 0.450
*EXPANSION, TYPE=ORTHO, ZERO=0.0
 0.000000, 0.000000, 0.000000
*PERMEABILITY, SPECIFIC=10.0
 1.0E-4, 1.0
*MATERIAL, NAME=MAT5
*ELASTIC
 5000.0, 0.450
*EXPANSION, TYPE=ORTHO, ZERO=0.0
 0.000000, 0.000000, 0.000000
*PERMEABILITY, SPECIFIC=10.0
 1.0E-4, 1.0
*MATERIAL, NAME=MAT6
*ELASTIC
 5000.0, 0.450
*EXPANSION, TYPE=ORTHO, ZERO=0.0
 0.012704, 0.012704, 0.012704
*PERMEABILITY, SPECIFIC=10.0
 1.0E-4, 1.0
*MATERIAL, NAME=MAT7
*ELASTIC
 5000.0, 0.450
*EXPANSION, TYPE=ORTHO, ZERO=0.0
 0.066013, 0.066013, 0.066013
*PERMEABILITY, SPECIFIC=10.0
 1.0E-4, 1.0
*MATERIAL, NAME=MAT8
*ELASTIC
 5000.0, 0.450
*EXPANSION, TYPE=ORTHO, ZERO=0.0
 0.098268, 0.098268, 0.098268
*PERMEABILITY, SPECIFIC=10.0
 1.0E-4, 1.0
*MATERIAL, NAME=MAT9
*ELASTIC
 5000.0, 0.450
*EXPANSION, TYPE=ORTHO, ZERO=0.0
 0.112092, 0.112092, 0.112092
*PERMEABILITY, SPECIFIC=10.0
 1.0E-4, 1.0
*MATERIAL, NAME=MAT10
*ELASTIC
 5000.0, 0.450
*EXPANSION, TYPE=ORTHO, ZERO=0.0
 0.122926, 0.122926, 0.122926
*PERMEABILITY, SPECIFIC=10.0
 1.0E-4, 1.0
*MATERIAL, NAME=MAT11
*ELASTIC
 5000.0, 0.450
*EXPANSION, TYPE=ORTHO, ZERO=0.0
 0.132669, 0.132669, 0.132669
*PERMEABILITY, SPECIFIC=10.0
 1.0E-4, 1.0
*NSET, NSET=ALLN
 1,2,3,4,5,6
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*NSET, NSET=BOTTOM
 1,2,3,4,5,6
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*NSET, NSET=DRAIN
 1,73,74,146,147,219
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*INITIAL CONDITIONS, TYPE=RATIO
 ALLN, 1.0
*INITIAL CONDITIONS, TYPE=TEMPERATURE
 ALLN, 0.0
*BOUNDARY
 BOTTOM, 1, 2
 DRAIN, 8, 8, 0.0
*STEP, INC=200
 growth pressurisation (fast)
*SOILS, CONSOLIDATION, UTOL=1.0E8
 1.0E-3, 1.0E-3, 1.0E-8, 1.0E-3
*TEMPERATURE
 ALLN, 1.0
*OUTPUT, FIELD
*ELEMENT OUTPUT, POSITION=CENTROID
 S, COORD
*NODE OUTPUT
 POR
*END STEP
*STEP, INC=500
 drainage / consolidation
*SOILS, CONSOLIDATION, UTOL=1.0E8
 0.1, 1.0E4, 1.0E-5, 1.0E3
*OUTPUT, FIELD
*ELEMENT OUTPUT, POSITION=CENTROID
 S, COORD
*NODE OUTPUT
 POR
*END STEP
