*HEADING
 Biofilm poroelastic column - Terzaghi consolidation (A2)
*NODE
 1, 0.00000, 0.00000, 0.00000
 2, 0.25000, 0.00000, 0.00000
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*ELEMENT, TYPE=C3D8P, ELSET=COL
 1, 1,2,4,3,5,6,8,7
 2, 5,6,8,7,9,10,12,11
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*SOLID SECTION, ELSET=COL, MATERIAL=PORO
*MATERIAL, NAME=PORO
*ELASTIC
 5000, 0.3
*PERMEABILITY, SPECIFIC=10.0
 0.0001, 1.0
*POROUS BULK MODULI
 2.2E5, 2.2E9
*NSET, NSET=ALLN
 1,2,3,4,5,6
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*NSET, NSET=TOPN
 65,66,67,68
*NSET, NSET=BOTN
 1,2,3,4
*INITIAL CONDITIONS, TYPE=RATIO
 ALLN, 1.0
*INITIAL CONDITIONS, TYPE=PORE PRESSURE
 ALLN, 1.0
*BOUNDARY
 ALLN, 1, 2
 BOTN, 3, 3
*STEP, NLGEOM=NO, INC=500
 consolidation / drainage
*SOILS, CONSOLIDATION, UTOL=0.1
 1.0E-6, 50.0, 1.0E-10, 2.0
*BOUNDARY
 TOPN, 8, 8, 0.0
*OUTPUT, FIELD, FREQUENCY=1
*NODE OUTPUT
 U, POR
*END STEP
