*HEADING
 Periodic RVE of threaded biofilm-implant interface, cond=DH profile=thread amp=0.180
*NODE
 1, 0.000000, 0.000000
 2, 0.020833, 0.000770
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*ELEMENT, TYPE=CPE4
 1, 1, 2, 51, 50
 2, 2, 3, 52, 51
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*ELSET, ELSET=ROW0
 1,2,3,4,5,6
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*ELSET, ELSET=ROW1
 49,50,51,52,53,54
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*ELSET, ELSET=ROW2
 97,98,99,100,101,102
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*ELSET, ELSET=ROW3
 145,146,147,148,149,150
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*ELSET, ELSET=ROW4
 193,194,195,196,197,198
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*ELSET, ELSET=ROW5
 241,242,243,244,245,246
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*ELSET, ELSET=ROW6
 289,290,291,292,293,294
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*ELSET, ELSET=ROW7
 337,338,339,340,341,342
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*ELSET, ELSET=ROW8
 385,386,387,388,389,390
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*ELSET, ELSET=ROW9
 433,434,435,436,437,438
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*ELSET, ELSET=ROW10
 481,482,483,484,485,486
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*ELSET, ELSET=ROW11
 529,530,531,532,533,534
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*ELSET, ELSET=ROW12
 577,578,579,580,581,582
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*ELSET, ELSET=ROW13
 625,626,627,628,629,630
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*ELSET, ELSET=ROW14
 673,674,675,676,677,678
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*ELSET, ELSET=ROW15
 721,722,723,724,725,726
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*ELSET, ELSET=ROW16
 769,770,771,772,773,774
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*ELSET, ELSET=ROW17
 817,818,819,820,821,822
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*ORIENTATION, NAME=ORI, SYSTEM=RECTANGULAR, DEFINITION=COORDINATES
 1.0, 0.0, 0.0, 0.0, 1.0, 0.0
 3, 0.0
*SOLID SECTION, ELSET=ROW0, MATERIAL=MAT0, ORIENTATION=ORI
*SOLID SECTION, ELSET=ROW1, MATERIAL=MAT1, ORIENTATION=ORI
*SOLID SECTION, ELSET=ROW2, MATERIAL=MAT2, ORIENTATION=ORI
*SOLID SECTION, ELSET=ROW3, MATERIAL=MAT3, ORIENTATION=ORI
*SOLID SECTION, ELSET=ROW4, MATERIAL=MAT4, ORIENTATION=ORI
*SOLID SECTION, ELSET=ROW5, MATERIAL=MAT5, ORIENTATION=ORI
*SOLID SECTION, ELSET=ROW6, MATERIAL=MAT6, ORIENTATION=ORI
*SOLID SECTION, ELSET=ROW7, MATERIAL=MAT7, ORIENTATION=ORI
*SOLID SECTION, ELSET=ROW8, MATERIAL=MAT8, ORIENTATION=ORI
*SOLID SECTION, ELSET=ROW9, MATERIAL=MAT9, ORIENTATION=ORI
*SOLID SECTION, ELSET=ROW10, MATERIAL=MAT10, ORIENTATION=ORI
*SOLID SECTION, ELSET=ROW11, MATERIAL=MAT11, ORIENTATION=ORI
*SOLID SECTION, ELSET=ROW12, MATERIAL=MAT12, ORIENTATION=ORI
*SOLID SECTION, ELSET=ROW13, MATERIAL=MAT13, ORIENTATION=ORI
*SOLID SECTION, ELSET=ROW14, MATERIAL=MAT14, ORIENTATION=ORI
*SOLID SECTION, ELSET=ROW15, MATERIAL=MAT15, ORIENTATION=ORI
*SOLID SECTION, ELSET=ROW16, MATERIAL=MAT16, ORIENTATION=ORI
*SOLID SECTION, ELSET=ROW17, MATERIAL=MAT17, ORIENTATION=ORI
*MATERIAL, NAME=MAT0
*ELASTIC
 5000.0, 0.450
*EXPANSION, TYPE=ORTHO, ZERO=0.0
 0.000000, 0.000000, 0.000000
*MATERIAL, NAME=MAT1
*ELASTIC
 5000.0, 0.450
*EXPANSION, TYPE=ORTHO, ZERO=0.0
 0.063270, 0.063270, 0.063270
*MATERIAL, NAME=MAT2
*ELASTIC
 5000.0, 0.450
*EXPANSION, TYPE=ORTHO, ZERO=0.0
 0.338826, 0.338826, 0.338826
*MATERIAL, NAME=MAT3
*ELASTIC
 5000.0, 0.450
*EXPANSION, TYPE=ORTHO, ZERO=0.0
 0.230409, 0.230409, 0.230409
*MATERIAL, NAME=MAT4
*ELASTIC
 5000.0, 0.450
*EXPANSION, TYPE=ORTHO, ZERO=0.0
 0.000000, 0.000000, 0.000000
*MATERIAL, NAME=MAT5
*ELASTIC
 5000.0, 0.450
*EXPANSION, TYPE=ORTHO, ZERO=0.0
 0.000000, 0.000000, 0.000000
*MATERIAL, NAME=MAT6
*ELASTIC
 5000.0, 0.450
*EXPANSION, TYPE=ORTHO, ZERO=0.0
 0.000000, 0.000000, 0.000000
*MATERIAL, NAME=MAT7
*ELASTIC
 5000.0, 0.450
*EXPANSION, TYPE=ORTHO, ZERO=0.0
 0.000000, 0.000000, 0.000000
*MATERIAL, NAME=MAT8
*ELASTIC
 5000.0, 0.450
*EXPANSION, TYPE=ORTHO, ZERO=0.0
 0.000000, 0.000000, 0.000000
*MATERIAL, NAME=MAT9
*ELASTIC
 5000.0, 0.450
*EXPANSION, TYPE=ORTHO, ZERO=0.0
 0.002380, 0.002380, 0.002380
*MATERIAL, NAME=MAT10
*ELASTIC
 5000.0, 0.450
*EXPANSION, TYPE=ORTHO, ZERO=0.0
 0.041648, 0.041648, 0.041648
*MATERIAL, NAME=MAT11
*ELASTIC
 5000.0, 0.450
*EXPANSION, TYPE=ORTHO, ZERO=0.0
 0.072966, 0.072966, 0.072966
*MATERIAL, NAME=MAT12
*ELASTIC
 5000.0, 0.450
*EXPANSION, TYPE=ORTHO, ZERO=0.0
 0.094819, 0.094819, 0.094819
*MATERIAL, NAME=MAT13
*ELASTIC
 5000.0, 0.450
*EXPANSION, TYPE=ORTHO, ZERO=0.0
 0.105379, 0.105379, 0.105379
*MATERIAL, NAME=MAT14
*ELASTIC
 5000.0, 0.450
*EXPANSION, TYPE=ORTHO, ZERO=0.0
 0.113738, 0.113738, 0.113738
*MATERIAL, NAME=MAT15
*ELASTIC
 5000.0, 0.450
*EXPANSION, TYPE=ORTHO, ZERO=0.0
 0.120802, 0.120802, 0.120802
*MATERIAL, NAME=MAT16
*ELASTIC
 5000.0, 0.450
*EXPANSION, TYPE=ORTHO, ZERO=0.0
 0.128567, 0.128567, 0.128567
*MATERIAL, NAME=MAT17
*ELASTIC
 5000.0, 0.450
*EXPANSION, TYPE=ORTHO, ZERO=0.0
 0.132719, 0.132719, 0.132719
*NSET, NSET=BOTTOM
 1,2,3,4,5,6
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*NSET, NSET=ALLN
 1,2,3,4,5,6
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** periodic left-right: u(left,j) = u(right,j)
*EQUATION
 2
 50, 1, 1.0, 98, 1, -1.0
*EQUATION
 2
 50, 2, 1.0, 98, 2, -1.0
*EQUATION
 2
 99, 1, 1.0, 147, 1, -1.0
*EQUATION
 2
 99, 2, 1.0, 147, 2, -1.0
*EQUATION
 2
 148, 1, 1.0, 196, 1, -1.0
*EQUATION
 2
 148, 2, 1.0, 196, 2, -1.0
*EQUATION
 2
 197, 1, 1.0, 245, 1, -1.0
*EQUATION
 2
 197, 2, 1.0, 245, 2, -1.0
*EQUATION
 2
 246, 1, 1.0, 294, 1, -1.0
*EQUATION
 2
 246, 2, 1.0, 294, 2, -1.0
*EQUATION
 2
 295, 1, 1.0, 343, 1, -1.0
*EQUATION
 2
 295, 2, 1.0, 343, 2, -1.0
*EQUATION
 2
 344, 1, 1.0, 392, 1, -1.0
*EQUATION
 2
 344, 2, 1.0, 392, 2, -1.0
*EQUATION
 2
 393, 1, 1.0, 441, 1, -1.0
*EQUATION
 2
 393, 2, 1.0, 441, 2, -1.0
*EQUATION
 2
 442, 1, 1.0, 490, 1, -1.0
*EQUATION
 2
 442, 2, 1.0, 490, 2, -1.0
*EQUATION
 2
 491, 1, 1.0, 539, 1, -1.0
*EQUATION
 2
 491, 2, 1.0, 539, 2, -1.0
*EQUATION
 2
 540, 1, 1.0, 588, 1, -1.0
*EQUATION
 2
 540, 2, 1.0, 588, 2, -1.0
*EQUATION
 2
 589, 1, 1.0, 637, 1, -1.0
*EQUATION
 2
 589, 2, 1.0, 637, 2, -1.0
*EQUATION
 2
 638, 1, 1.0, 686, 1, -1.0
*EQUATION
 2
 638, 2, 1.0, 686, 2, -1.0
*EQUATION
 2
 687, 1, 1.0, 735, 1, -1.0
*EQUATION
 2
 687, 2, 1.0, 735, 2, -1.0
*EQUATION
 2
 736, 1, 1.0, 784, 1, -1.0
*EQUATION
 2
 736, 2, 1.0, 784, 2, -1.0
*EQUATION
 2
 785, 1, 1.0, 833, 1, -1.0
*EQUATION
 2
 785, 2, 1.0, 833, 2, -1.0
*EQUATION
 2
 834, 1, 1.0, 882, 1, -1.0
*EQUATION
 2
 834, 2, 1.0, 882, 2, -1.0
*EQUATION
 2
 883, 1, 1.0, 931, 1, -1.0
*EQUATION
 2
 883, 2, 1.0, 931, 2, -1.0
*INITIAL CONDITIONS, TYPE=TEMPERATURE
 ALLN, 0.0
*BOUNDARY
 BOTTOM, 1, 2
*STEP
 Periodic-RVE confined growth -> interface stress (laterally-infinite limit)
*STATIC
*TEMPERATURE
 ALLN, 1.0
*OUTPUT, FIELD
*NODE OUTPUT
 U
*ELEMENT OUTPUT, POSITION=CENTROID
 S, COORD
*END STEP
