*HEADING
 3-D helical implant-screw biofilm, cond=DH, 3 turns, occlusal=20 flowshear=0
*NODE
 1, 2.000000, 0.000000, 0.000000
 2, 1.983653, 0.261153, 0.000000
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*ELEMENT, TYPE=C3D8, ELSET=FILM
 1, 1,49,50,2,241,289,290,242
 2, 2,50,51,3,242,290,291,243
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*ELSET, ELSET=RLAY0
 1,2,3,4,5,6
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*ELSET, ELSET=RLAY1
 49,50,51,52,53,54
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*ELSET, ELSET=RLAY2
 97,98,99,100,101,102
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*ELSET, ELSET=RLAY3
 145,146,147,148,149,150
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*SOLID SECTION, ELSET=RLAY0, MATERIAL=MAT0
*SOLID SECTION, ELSET=RLAY1, MATERIAL=MAT1
*SOLID SECTION, ELSET=RLAY2, MATERIAL=MAT2
*SOLID SECTION, ELSET=RLAY3, MATERIAL=MAT3
*MATERIAL, NAME=MAT0
*ELASTIC
 5000.0, 0.450
*EXPANSION
 0.330638
*MATERIAL, NAME=MAT1
*ELASTIC
 5000.0, 0.450
*EXPANSION
 0.000000
*MATERIAL, NAME=MAT2
*ELASTIC
 5000.0, 0.450
*EXPANSION
 0.066013
*MATERIAL, NAME=MAT3
*ELASTIC
 5000.0, 0.450
*EXPANSION
 0.122926
*NSET, NSET=INNER
 1,2,3,4,5,6
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*NSET, NSET=ZENDS
 1,2,3,4,5,6
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*NSET, NSET=ALLN
 1,2,3,4,5,6
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*NSET, NSET=TOP
 14401,14402,14403,14404,14405,14406
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*NSET, NSET=OUTER
 193,194,195,196,197,198
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*NSET, NSET=ZBOT
 1,2,3,4,5,6
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*INITIAL CONDITIONS, TYPE=TEMPERATURE
 ALLN, 0.0
*BOUNDARY
 INNER, 1, 3
 ZBOT, 3, 3
*STEP
 growth eigenstrain
*STATIC
*TEMPERATURE
 ALLN, 1.0
*OUTPUT, FIELD
*NODE OUTPUT
 U
*ELEMENT OUTPUT, POSITION=CENTROID
 S, COORD
*END STEP
*STEP
 occlusal / flow load on top of growth (held)
*STATIC
*CLOAD
 14401, 3, -20
 14402, 3, -20
 14403, 3, -20
 14404, 3, -20
 14405, 3, -20
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 14640, 3, -20
*OUTPUT, FIELD
*NODE OUTPUT
 U
*ELEMENT OUTPUT, POSITION=CENTROID
 S, COORD
*END STEP
