*HEADING
 Tier-2 parametric alveolar bone: implant + adjacent tooth coupled through bone
*NODE
 1, 0.00000, 0.00000, 0.00000
 2, 0.50000, 0.00000, 0.00000
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*ELEMENT, TYPE=C3D8, ELSET=BONE
 1, 1,2,39,38,778,779,816,815
 2, 2,3,40,39,779,780,817,816
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*ELEMENT, TYPE=C3D8, ELSET=TI
 225, 231,232,269,268,1008,1009,1046,1045
 226, 232,233,270,269,1009,1010,1047,1046
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*ELEMENT, TYPE=C3D8, ELSET=DENTIN
 4525, 4872,4873,4910,4909,5649,5650,5687,5686
 4526, 4873,4874,4911,4910,5650,5651,5688,5687
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*ELEMENT, TYPE=C3D8, ELSET=PDL
 4489, 4835,4836,4873,4872,5612,5613,5650,5649
 4490, 4836,4837,4874,4873,5613,5614,5651,5650
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*ELEMENT, TYPE=C3D8, ELSET=BIOFILM
 11689, 12605,12606,12643,12642,13382,13383,13420,13419
 11690, 12606,12607,12644,12643,13383,13384,13421,13420
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*SOLID SECTION, ELSET=BONE, MATERIAL=BONE
*MATERIAL, NAME=BONE
*ELASTIC
 13700.0, 0.300
*SOLID SECTION, ELSET=TI, MATERIAL=TI
*MATERIAL, NAME=TI
*ELASTIC
 110000.0, 0.340
*SOLID SECTION, ELSET=DENTIN, MATERIAL=DENTIN
*MATERIAL, NAME=DENTIN
*ELASTIC
 18000.0, 0.310
*SOLID SECTION, ELSET=PDL, MATERIAL=PDL
*MATERIAL, NAME=PDL
*ELASTIC
 50.0, 0.450
*SOLID SECTION, ELSET=BIOFILM, MATERIAL=BIOFILM
*MATERIAL, NAME=BIOFILM
*ELASTIC
 1.0, 0.450
*EXPANSION
 0.190000
*NSET, NSET=FIXED
 1,2,3,4,5,6
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*NSET, NSET=IMPTOP
 20470,20471,20472,20473,20474,20506
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*NSET, NSET=TOOTOP
 20449,20450,20451,20452,20453,20485
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*NSET, NSET=ALLN
 1,2,3,4,5,6
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*INITIAL CONDITIONS, TYPE=TEMPERATURE
 ALLN, 0.0
*BOUNDARY
 FIXED, 1, 3
*STEP
 1) dysbiotic biofilm growth
*STATIC
*TEMPERATURE
 ALLN, 1.0
*OUTPUT, FIELD
*NODE OUTPUT
 U
*ELEMENT OUTPUT, POSITION=CENTROID
 S, COORD
*END STEP
*STEP
 2) occlusal (masticatory) load on both crowns -> coupled through bone
*STATIC
*CLOAD
 20470, 3, -50.0
 20470, 1, 10.0
 20471, 3, -50.0
 20471, 1, 10.0
 20472, 3, -50.0
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 20749, 1, 10.0
*OUTPUT, FIELD
*NODE OUTPUT
 U
*ELEMENT OUTPUT, POSITION=CENTROID
 S, COORD
*END STEP
