*HEADING
 Viscoelastic implant-thread, cond=DH
*NODE
 1, 0.000000, 0.000000
 2, 0.027778, 0.001367
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*ELEMENT, TYPE=CPE4
 1, 1, 2, 111, 110
 2, 2, 3, 112, 111
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*ELSET, ELSET=ROW0
 1,2,3,4,5,6
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*ELSET, ELSET=ROW1
 109,110,111,112,113,114
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*ELSET, ELSET=ROW2
 217,218,219,220,221,222
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*ELSET, ELSET=ROW3
 325,326,327,328,329,330
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*ELSET, ELSET=ROW4
 433,434,435,436,437,438
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*ELSET, ELSET=ROW5
 541,542,543,544,545,546
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*ELSET, ELSET=ROW6
 649,650,651,652,653,654
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*ELSET, ELSET=ROW7
 757,758,759,760,761,762
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*ELSET, ELSET=ROW8
 865,866,867,868,869,870
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*ELSET, ELSET=ROW9
 973,974,975,976,977,978
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*ELSET, ELSET=ROW10
 1081,1082,1083,1084,1085,1086
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*ELSET, ELSET=ROW11
 1189,1190,1191,1192,1193,1194
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*ELSET, ELSET=ROW12
 1297,1298,1299,1300,1301,1302
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*ELSET, ELSET=ROW13
 1405,1406,1407,1408,1409,1410
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*ELSET, ELSET=ROW14
 1513,1514,1515,1516,1517,1518
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*ELSET, ELSET=ROW15
 1621,1622,1623,1624,1625,1626
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*ELSET, ELSET=ROW16
 1729,1730,1731,1732,1733,1734
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*ELSET, ELSET=ROW17
 1837,1838,1839,1840,1841,1842
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*ORIENTATION, NAME=ORI, SYSTEM=RECTANGULAR, DEFINITION=COORDINATES
 1.0,0.0,0.0,0.0,1.0,0.0
 3, 0.0
*SOLID SECTION, ELSET=ROW0, MATERIAL=MAT0, ORIENTATION=ORI
*SOLID SECTION, ELSET=ROW1, MATERIAL=MAT1, ORIENTATION=ORI
*SOLID SECTION, ELSET=ROW2, MATERIAL=MAT2, ORIENTATION=ORI
*SOLID SECTION, ELSET=ROW3, MATERIAL=MAT3, ORIENTATION=ORI
*SOLID SECTION, ELSET=ROW4, MATERIAL=MAT4, ORIENTATION=ORI
*SOLID SECTION, ELSET=ROW5, MATERIAL=MAT5, ORIENTATION=ORI
*SOLID SECTION, ELSET=ROW6, MATERIAL=MAT6, ORIENTATION=ORI
*SOLID SECTION, ELSET=ROW7, MATERIAL=MAT7, ORIENTATION=ORI
*SOLID SECTION, ELSET=ROW8, MATERIAL=MAT8, ORIENTATION=ORI
*SOLID SECTION, ELSET=ROW9, MATERIAL=MAT9, ORIENTATION=ORI
*SOLID SECTION, ELSET=ROW10, MATERIAL=MAT10, ORIENTATION=ORI
*SOLID SECTION, ELSET=ROW11, MATERIAL=MAT11, ORIENTATION=ORI
*SOLID SECTION, ELSET=ROW12, MATERIAL=MAT12, ORIENTATION=ORI
*SOLID SECTION, ELSET=ROW13, MATERIAL=MAT13, ORIENTATION=ORI
*SOLID SECTION, ELSET=ROW14, MATERIAL=MAT14, ORIENTATION=ORI
*SOLID SECTION, ELSET=ROW15, MATERIAL=MAT15, ORIENTATION=ORI
*SOLID SECTION, ELSET=ROW16, MATERIAL=MAT16, ORIENTATION=ORI
*SOLID SECTION, ELSET=ROW17, MATERIAL=MAT17, ORIENTATION=ORI
*MATERIAL, NAME=MAT0
*ELASTIC
 5000.0, 0.450
*EXPANSION, TYPE=ORTHO, ZERO=0.0
 0.000000, 0.000000, 0.000000
*VISCOELASTIC, TIME=PRONY
 0.321384, 0.0, 6.641884
 0.628616, 0.0, 903.358116
*MATERIAL, NAME=MAT1
*ELASTIC
 5000.0, 0.450
*EXPANSION, TYPE=ORTHO, ZERO=0.0
 0.063270, 0.063270, 0.063270
*VISCOELASTIC, TIME=PRONY
 0.321384, 0.0, 6.641884
 0.628616, 0.0, 903.358116
*MATERIAL, NAME=MAT2
*ELASTIC
 5000.0, 0.450
*EXPANSION, TYPE=ORTHO, ZERO=0.0
 0.338826, 0.338826, 0.338826
*VISCOELASTIC, TIME=PRONY
 0.321384, 0.0, 6.641884
 0.628616, 0.0, 903.358116
*MATERIAL, NAME=MAT3
*ELASTIC
 5000.0, 0.450
*EXPANSION, TYPE=ORTHO, ZERO=0.0
 0.230409, 0.230409, 0.230409
*VISCOELASTIC, TIME=PRONY
 0.321384, 0.0, 6.641884
 0.628616, 0.0, 903.358116
*MATERIAL, NAME=MAT4
*ELASTIC
 5000.0, 0.450
*EXPANSION, TYPE=ORTHO, ZERO=0.0
 0.000000, 0.000000, 0.000000
*VISCOELASTIC, TIME=PRONY
 0.321384, 0.0, 6.641884
 0.628616, 0.0, 903.358116
*MATERIAL, NAME=MAT5
*ELASTIC
 5000.0, 0.450
*EXPANSION, TYPE=ORTHO, ZERO=0.0
 0.000000, 0.000000, 0.000000
*VISCOELASTIC, TIME=PRONY
 0.321384, 0.0, 6.641884
 0.628616, 0.0, 903.358116
*MATERIAL, NAME=MAT6
*ELASTIC
 5000.0, 0.450
*EXPANSION, TYPE=ORTHO, ZERO=0.0
 0.000000, 0.000000, 0.000000
*VISCOELASTIC, TIME=PRONY
 0.321384, 0.0, 6.641884
 0.628616, 0.0, 903.358116
*MATERIAL, NAME=MAT7
*ELASTIC
 5000.0, 0.450
*EXPANSION, TYPE=ORTHO, ZERO=0.0
 0.000000, 0.000000, 0.000000
*VISCOELASTIC, TIME=PRONY
 0.321384, 0.0, 6.641884
 0.628616, 0.0, 903.358116
*MATERIAL, NAME=MAT8
*ELASTIC
 5000.0, 0.450
*EXPANSION, TYPE=ORTHO, ZERO=0.0
 0.000000, 0.000000, 0.000000
*VISCOELASTIC, TIME=PRONY
 0.321384, 0.0, 6.641884
 0.628616, 0.0, 903.358116
*MATERIAL, NAME=MAT9
*ELASTIC
 5000.0, 0.450
*EXPANSION, TYPE=ORTHO, ZERO=0.0
 0.002380, 0.002380, 0.002380
*VISCOELASTIC, TIME=PRONY
 0.321384, 0.0, 6.641884
 0.628616, 0.0, 903.358116
*MATERIAL, NAME=MAT10
*ELASTIC
 5000.0, 0.450
*EXPANSION, TYPE=ORTHO, ZERO=0.0
 0.041648, 0.041648, 0.041648
*VISCOELASTIC, TIME=PRONY
 0.321384, 0.0, 6.641884
 0.628616, 0.0, 903.358116
*MATERIAL, NAME=MAT11
*ELASTIC
 5000.0, 0.450
*EXPANSION, TYPE=ORTHO, ZERO=0.0
 0.072966, 0.072966, 0.072966
*VISCOELASTIC, TIME=PRONY
 0.321384, 0.0, 6.641884
 0.628616, 0.0, 903.358116
*MATERIAL, NAME=MAT12
*ELASTIC
 5000.0, 0.450
*EXPANSION, TYPE=ORTHO, ZERO=0.0
 0.094819, 0.094819, 0.094819
*VISCOELASTIC, TIME=PRONY
 0.321384, 0.0, 6.641884
 0.628616, 0.0, 903.358116
*MATERIAL, NAME=MAT13
*ELASTIC
 5000.0, 0.450
*EXPANSION, TYPE=ORTHO, ZERO=0.0
 0.105379, 0.105379, 0.105379
*VISCOELASTIC, TIME=PRONY
 0.321384, 0.0, 6.641884
 0.628616, 0.0, 903.358116
*MATERIAL, NAME=MAT14
*ELASTIC
 5000.0, 0.450
*EXPANSION, TYPE=ORTHO, ZERO=0.0
 0.113738, 0.113738, 0.113738
*VISCOELASTIC, TIME=PRONY
 0.321384, 0.0, 6.641884
 0.628616, 0.0, 903.358116
*MATERIAL, NAME=MAT15
*ELASTIC
 5000.0, 0.450
*EXPANSION, TYPE=ORTHO, ZERO=0.0
 0.120802, 0.120802, 0.120802
*VISCOELASTIC, TIME=PRONY
 0.321384, 0.0, 6.641884
 0.628616, 0.0, 903.358116
*MATERIAL, NAME=MAT16
*ELASTIC
 5000.0, 0.450
*EXPANSION, TYPE=ORTHO, ZERO=0.0
 0.128567, 0.128567, 0.128567
*VISCOELASTIC, TIME=PRONY
 0.321384, 0.0, 6.641884
 0.628616, 0.0, 903.358116
*MATERIAL, NAME=MAT17
*ELASTIC
 5000.0, 0.450
*EXPANSION, TYPE=ORTHO, ZERO=0.0
 0.132719, 0.132719, 0.132719
*VISCOELASTIC, TIME=PRONY
 0.321384, 0.0, 6.641884
 0.628616, 0.0, 903.358116
*NSET, NSET=BOTTOM
 1,2,3,4,5,6
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*NSET, NSET=ALLN
 1,2,3,4,5,6
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*INITIAL CONDITIONS, TYPE=TEMPERATURE
 ALLN, 0.0
*BOUNDARY
 BOTTOM, 1, 2
*STEP, INC=200
 instantaneous growth (t << tau)
*VISCO, CETOL=1.0E-2
 1.0E-4, 1.0E-3, 1.0E-9, 1.0E-3
*TEMPERATURE
 ALLN, 1.0
*OUTPUT, FIELD
*ELEMENT OUTPUT, POSITION=CENTROID
 S, COORD
*END STEP
*STEP, INC=500
 hold, relax (t >> tau)
*VISCO, CETOL=1.0E-2
 1.0, 1.0E5, 1.0E-4, 1.0E4
*OUTPUT, FIELD
*ELEMENT OUTPUT, POSITION=CENTROID
 S, COORD
*END STEP
